New Capacitor.uc96 bus1=udt9927 phases=3 Kv=12.47 conn=Wye Kvar=450.0

New CapControl.uc96 Capacitor=uc96 Element=Line.l(r:udt8033-udt9927) Terminal=1 delay=100.0 Type=voltage Vmin=120.5 Vmax=125.0 Ptratio=59.99631547328862 Ctratio=100.0
