New Capacitor.uc94 bus1=udt7163 phases=3 Kv=12.47 conn=Wye Kvar=300.0

New CapControl.uc94 Capacitor=uc94 Element=Line.l(r:udt7163-udt7890) Terminal=1 delay=100.0 Type=voltage Vmin=120.5 Vmax=125.0 Ptratio=59.99631547328862 Ctratio=100.0
