Clear

New Circuit.substation_uhs20_69 bus1=uhs20_69 pu=1.0 basekV=69.0 R1=1e-05 X1=1e-05 R0=1e-05 X0=1e-05

Redirect [C:/Users/f00863x/OPRO/output/smartgridcomm_greensboro_llama_v2/SMARTDS_GSO_solar_extreme_batt_high_peak_opendss/uhs20_1247/LineCodes.dss]
Redirect [C:/Users/f00863x/OPRO/output/smartgridcomm_greensboro_llama_v2/SMARTDS_GSO_solar_extreme_batt_high_peak_opendss/uhs20_1247/uhs20_1247--udt5173/LineCodes.dss]
Redirect [C:/Users/f00863x/OPRO/output/smartgridcomm_greensboro_llama_v2/SMARTDS_GSO_solar_extreme_batt_high_peak_opendss/uhs20_1247/uhs20_1247--udt8894/LineCodes.dss]
Redirect [C:/Users/f00863x/OPRO/output/smartgridcomm_greensboro_llama_v2/SMARTDS_GSO_solar_extreme_batt_high_peak_opendss/uhs20_1247/uhs20_1247--udt9897/LineCodes.dss]
Redirect [C:/Users/f00863x/OPRO/output/smartgridcomm_greensboro_llama_v2/SMARTDS_GSO_solar_extreme_batt_high_peak_opendss/uhs20_1247/Lines.dss]
Redirect [C:/Users/f00863x/OPRO/output/smartgridcomm_greensboro_llama_v2/SMARTDS_GSO_solar_extreme_batt_high_peak_opendss/uhs20_1247/uhs20_1247--udt5173/Lines.dss]
Redirect [C:/Users/f00863x/OPRO/output/smartgridcomm_greensboro_llama_v2/SMARTDS_GSO_solar_extreme_batt_high_peak_opendss/uhs20_1247/uhs20_1247--udt8894/Lines.dss]
Redirect [C:/Users/f00863x/OPRO/output/smartgridcomm_greensboro_llama_v2/SMARTDS_GSO_solar_extreme_batt_high_peak_opendss/uhs20_1247/uhs20_1247--udt9897/Lines.dss]
Redirect [C:/Users/f00863x/OPRO/output/smartgridcomm_greensboro_llama_v2/SMARTDS_GSO_solar_extreme_batt_high_peak_opendss/uhs20_1247/Transformers.dss]
Redirect [C:/Users/f00863x/OPRO/output/smartgridcomm_greensboro_llama_v2/SMARTDS_GSO_solar_extreme_batt_high_peak_opendss/uhs20_1247/uhs20_1247--udt5173/Transformers.dss]
Redirect [C:/Users/f00863x/OPRO/output/smartgridcomm_greensboro_llama_v2/SMARTDS_GSO_solar_extreme_batt_high_peak_opendss/uhs20_1247/uhs20_1247--udt8894/Transformers.dss]
Redirect [C:/Users/f00863x/OPRO/output/smartgridcomm_greensboro_llama_v2/SMARTDS_GSO_solar_extreme_batt_high_peak_opendss/uhs20_1247/uhs20_1247--udt9897/Transformers.dss]
Redirect [C:/Users/f00863x/OPRO/output/smartgridcomm_greensboro_llama_v2/SMARTDS_GSO_solar_extreme_batt_high_peak_opendss/uhs20_1247/Regulators.dss]
Redirect [C:/Users/f00863x/OPRO/output/smartgridcomm_greensboro_llama_v2/SMARTDS_GSO_solar_extreme_batt_high_peak_opendss/uhs20_1247/uhs20_1247--udt5173/Loads.dss]
Redirect [C:/Users/f00863x/OPRO/output/smartgridcomm_greensboro_llama_v2/SMARTDS_GSO_solar_extreme_batt_high_peak_opendss/uhs20_1247/uhs20_1247--udt8894/Loads.dss]
Redirect [C:/Users/f00863x/OPRO/output/smartgridcomm_greensboro_llama_v2/SMARTDS_GSO_solar_extreme_batt_high_peak_opendss/uhs20_1247/uhs20_1247--udt9897/Loads.dss]
Redirect [C:/Users/f00863x/OPRO/output/smartgridcomm_greensboro_llama_v2/SMARTDS_GSO_solar_extreme_batt_high_peak_opendss/uhs20_1247/uhs20_1247--udt5173/Capacitors.dss]
Redirect [C:/Users/f00863x/OPRO/output/smartgridcomm_greensboro_llama_v2/SMARTDS_GSO_solar_extreme_batt_high_peak_opendss/uhs20_1247/uhs20_1247--udt8894/Capacitors.dss]
Redirect [C:/Users/f00863x/OPRO/output/smartgridcomm_greensboro_llama_v2/SMARTDS_GSO_solar_extreme_batt_high_peak_opendss/uhs20_1247/uhs20_1247--udt9897/Capacitors.dss]
Redirect [C:/Users/f00863x/OPRO/output/smartgridcomm_greensboro_llama_v2/SMARTDS_GSO_solar_extreme_batt_high_peak_opendss/uhs20_1247/Storage.dss]
Redirect [C:/Users/f00863x/OPRO/output/smartgridcomm_greensboro_llama_v2/SMARTDS_GSO_solar_extreme_batt_high_peak_opendss/uhs20_1247/uhs20_1247--udt5173/Storage.dss]
Redirect [C:/Users/f00863x/OPRO/output/smartgridcomm_greensboro_llama_v2/SMARTDS_GSO_solar_extreme_batt_high_peak_opendss/uhs20_1247/uhs20_1247--udt8894/Storage.dss]
Redirect [C:/Users/f00863x/OPRO/output/smartgridcomm_greensboro_llama_v2/SMARTDS_GSO_solar_extreme_batt_high_peak_opendss/uhs20_1247/uhs20_1247--udt9897/Storage.dss]
Redirect [C:/Users/f00863x/OPRO/output/smartgridcomm_greensboro_llama_v2/generated/restoration/patched/uhs20_1247--udt5173/PVSystems.dss]
Redirect [C:/Users/f00863x/OPRO/output/smartgridcomm_greensboro_llama_v2/generated/restoration/patched/uhs20_1247--udt8894/PVSystems.dss]
Redirect [C:/Users/f00863x/OPRO/output/smartgridcomm_greensboro_llama_v2/generated/restoration/patched/uhs20_1247--udt9897/PVSystems.dss]

Set Voltagebases=[0.12, 0.208, 0.24, 0.48, 7.2, 12.47, 69.0]

Calcvoltagebases

Buscoords [C:/Users/f00863x/OPRO/output/smartgridcomm_greensboro_llama_v2/SMARTDS_GSO_solar_extreme_batt_high_peak_opendss/uhs20_1247/Buscoords.dss]
set maxcontroliter=50

! Disabled by GridGuard compatibility overlay: Solve
! Disabled by GridGuard compatibility overlay: Plot Profile Phases=All
