Clear

New Circuit.feeder_udt8894-uhs20_1247x bus1=udt8894-uhs20_1247x pu=1.03 basekV=12.47 R1=1e-05 X1=1e-05 R0=1e-05 X0=1e-05

Redirect [C:/Users/f00863x/OPRO/output/smartgridcomm_greensboro_llama_v2/SMARTDS_GSO_solar_extreme_batt_high_peak_opendss/uhs20_1247/uhs20_1247--udt8894/LineCodes.dss]
Redirect [C:/Users/f00863x/OPRO/output/smartgridcomm_greensboro_llama_v2/SMARTDS_GSO_solar_extreme_batt_high_peak_opendss/uhs20_1247/uhs20_1247--udt8894/Lines.dss]
Redirect [C:/Users/f00863x/OPRO/output/smartgridcomm_greensboro_llama_v2/SMARTDS_GSO_solar_extreme_batt_high_peak_opendss/uhs20_1247/uhs20_1247--udt8894/Transformers.dss]
Redirect [C:/Users/f00863x/OPRO/output/smartgridcomm_greensboro_llama_v2/SMARTDS_GSO_solar_extreme_batt_high_peak_opendss/uhs20_1247/uhs20_1247--udt8894/Loads.dss]
Redirect [C:/Users/f00863x/OPRO/output/smartgridcomm_greensboro_llama_v2/SMARTDS_GSO_solar_extreme_batt_high_peak_opendss/uhs20_1247/uhs20_1247--udt8894/Capacitors.dss]
Redirect [C:/Users/f00863x/OPRO/output/smartgridcomm_greensboro_llama_v2/SMARTDS_GSO_solar_extreme_batt_high_peak_opendss/uhs20_1247/uhs20_1247--udt8894/Storage.dss]
Redirect [C:/Users/f00863x/OPRO/output/smartgridcomm_greensboro_llama_v2/generated/voltage/patched/PVSystems.dss]

Set Voltagebases=[0.12, 0.208, 0.24, 0.48, 7.2, 12.47]

Calcvoltagebases

Buscoords [C:/Users/f00863x/OPRO/output/smartgridcomm_greensboro_llama_v2/SMARTDS_GSO_solar_extreme_batt_high_peak_opendss/uhs20_1247/uhs20_1247--udt8894/Buscoords.dss]
set maxcontroliter=50

! Disabled by GridGuard compatibility overlay: Solve
! Disabled by GridGuard compatibility overlay: Plot Profile Phases=All
